*Heading
** Job name: QuarterEllipse_push_gammahat5em2 Model name: QuarterEllipse_push_gammahat5em2
** Generated by: Abaqus/CAE 2024
*Preprint, echo=NO, model=NO, history=NO, contact=NO
**
** PARTS
**
*Part, name=Part-1
*Node
      1,   3.45000005,           0.,           0.
      2,           0.,    2.8499999,           0.
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*Element, type=C3D8R
   1,   926,  3795, 17093,  3747,     1,    11,  1095,   464
   2,  3795,  3796, 17094, 17093,    11,    12,  1096,  1095
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*Nset, nset=Subcortex
     1,     2,     5,     8,     9,    10
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*Elset, elset=Subcortex, generate
  7771,  36565,      1
*Nset, nset=Cortex
     1,     2,     3,     4,     5,     6
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*Elset, elset=Cortex, generate
    1,  7770,     1
*Nset, nset=back
     1,     2,     3,     4,    10,    11
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*Elset, elset=back
     1,     2,     3,     4,     5,     6
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*Nset, nset=bottom
     1,     4,     7,     8,     9,    10
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*Elset, elset=bottom
     1,   223,   445,   667,   889,  1111
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*Nset, nset=side-1
     2,     3,     5,     6,     9,    10
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*Elset, elset=side-1
   222,   444,   666,   888,  1110,  1332
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*Nset, nset=side-2
     1,     4,     7,     8,     9,    10
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*Elset, elset=side-2
     1,   223,   445,   667,   889,  1111
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*Nset, nset=cortex_front
    5,    6,    7,    8,  465,  466
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*Elset, elset=cortex_front, generate
 6217,  7770,     1
*Nset, nset=subcortex_front
     5,     8,     9,   465,   466,   467
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*Nset, nset=whole-domain, generate
     1,  44832,      1
*Elset, elset=whole-domain, generate
     1,  36565,      1
*Nset, nset=node
 7,
*Elset, elset=_top_s_S5, internal
 1333, 1334, 1335, 1336, 1337, 1338
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*Surface, type=ELEMENT, name=top_s
_top_s_S5, S5
*Elset, elset=_cortex_s_S1, internal, generate
 6217,  7770,     1
*Surface, type=ELEMENT, name=cortex_s
_cortex_s_S1, S1
*Elset, elset=_subcortex_s_S1, internal, generate
  7771,  13529,      1
*Surface, type=ELEMENT, name=subcortex_s
_subcortex_s_S1, S1
*Elset, elset=_side1_s_S6, internal
  7771,  7833,  7863,  7871,  7883,  7885
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*Elset, elset=_side1_s_S4, internal
   222,   444,   666,   888,  1110,  1332
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*Surface, type=ELEMENT, name=side1_s
_side1_s_S6, S6
_side1_s_S4, S4
*Elset, elset=_side2_s_S6, internal, generate
    1,  7549,   222
*Elset, elset=_side2_s_S3, internal
  7809,  7810,  7811,  7813,  7814,  7816
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*Elset, elset=_side2_s_S5, internal
  7826,  7829,  7887,  7892,  7998,  8001
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*Surface, type=ELEMENT, name=side2_s
_side2_s_S6, S6
_side2_s_S3, S3
_side2_s_S5, S5
*Elset, elset=_interface_s_S3, internal
    1,    2,    3,    4,    5,    6
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*Surface, type=ELEMENT, name=interface_s
_interface_s_S3, S3
** Section: Cortex
*Solid Section, elset=Cortex, controls=EC-1, material=GRAY
,
** Section: Subcortex
*Solid Section, elset=Subcortex, controls=EC-1, material=WHIT
,
*End Part
**
*Part, name=wall
*Node
      1, -0.200000003,          -2.,           0.
      2,           0.,          -2.,           0.
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*Element, type=R3D4
 1,  1,  2,  4,  3
 2,  3,  4,  6,  5
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*Node
     83, -0.100000001,           1.,           0.
*Nset, nset=wall-RefPt_, internal
83,
*Nset, nset=ref
 83,
*Elset, elset=_s_wall_SPOS, internal, generate
  1,  40,   1
*Surface, type=ELEMENT, name=s_wall
_s_wall_SPOS, SPOS
*Elset, elset=wall, generate
  1,  40,   1
*End Part
**
**
** ASSEMBLY
**
*Assembly, name=Assembly
**
*Instance, name=Part-1, part=Part-1
*End Instance
**
*Instance, name=wall-1, part=wall
       -0.01,        1.425,        -0.05
       -0.01,        1.425,        -0.05,        -0.01,        2.425,        -0.05,          90.
*End Instance
**
*Instance, name=wall-2, part=wall
        3.45,        -0.01,        -0.05
        3.45,        -0.01,        -0.05, 2.87264972044796, 0.567350279552042, 0.527350279552042, 119.999999109416
*End Instance
**
*Rigid Body, ref node=wall-1.wall-RefPt_, elset=wall-1.wall
*Rigid Body, ref node=wall-2.wall-RefPt_, elset=wall-2.wall
*End Assembly
**
** ELEMENT CONTROLS
**
*Section Controls, name=EC-1, hourglass=ENHANCED
1., 1., 1.
*Amplitude, name=Amp-1
             0.,              0.,              1.,              1.
**
** MATERIALS
**
*Material, name=GRAY
*Density
 1e-11,
*Depvar
      7,
*User Material, constants=6
 0.002, 0.2, 1.5, 0.1, 3.6,  3.
*Material, name=WHIT
*Density
 1e-11,
*Depvar
     10,
*User Material, constants=15
 0.001,   0.1,   1.5,    1.,  0.05,   0.1,  0.45,  3.45
  2.85,   0.4,    4.,   0.4, 0.415,   10., 0.415
**
** INTERACTION PROPERTIES
**
*Surface Interaction, name=IntProp-1, pad thickness=0.1
*Friction
10.,
*Surface Behavior, pressure-overclosure=HARD
*Surface Interaction, name=IntProp-2
*Friction
10.,
*Surface Behavior, pressure-overclosure=HARD
**
** BOUNDARY CONDITIONS
**
** Name: back Type: Displacement/Rotation
*Boundary, amplitude=Amp-1
Part-1.back, 3, 3
** Name: bottom Type: Displacement/Rotation
*Boundary, amplitude=Amp-1
Part-1.bottom, 2, 2
Part-1.bottom, 3, 3
** Name: cortex_front Type: Displacement/Rotation
*Boundary, amplitude=Amp-1
Part-1.cortex_front, 3, 3
** Name: ref-left Type: Symmetry/Antisymmetry/Encastre
*Boundary
wall-1.ref, ENCASTRE
** Name: ref-right Type: Symmetry/Antisymmetry/Encastre
*Boundary
wall-2.ref, ENCASTRE
** Name: side-1 Type: Displacement/Rotation
*Boundary, amplitude=Amp-1
Part-1.side-1, 1, 1
** Name: subcortex_front Type: Displacement/Rotation
*Boundary, amplitude=Amp-1
Part-1.subcortex_front, 3, 3
** ----------------------------------------------------------------
**
** STEP: growth
**
*Step, name=growth, nlgeom=YES
*Dynamic, Explicit
, 1.
*Bulk Viscosity
0., 0.
** Mass Scaling: Semi-Automatic
**               Whole Model
*Fixed Mass Scaling, factor=120.
**
** LOADS
**
** Name: Viscous Pressure   Type: Pressure
*Dsload, amplitude=Amp-1
Part-1.top_s, VP, 1e-05
**
** INTERACTIONS
**
** Interaction: Int-1
*Contact Pair, interaction=IntProp-1, mechanical constraint=KINEMATIC, cpset=Int-1
Part-1.top_s,
** Interaction: Int-2
*Contact Pair, interaction=IntProp-2, mechanical constraint=KINEMATIC, cpset=Int-2
wall-1.s_wall, Part-1.top_s
** Interaction: Int-3
*Contact Pair, interaction=IntProp-2, mechanical constraint=KINEMATIC, cpset=Int-3
wall-2.s_wall, Part-1.top_s
**
** OUTPUT REQUESTS
**
*Restart, write, number interval=1, time marks=NO
**
** FIELD OUTPUT: F-Output-1
**
*Output, field, variable=PRESELECT
**
** FIELD OUTPUT: F-Output-3
**
*Output, field, number interval=500
*Node Output, nset=Part-1.Cortex
COORD, U
*Element Output, elset=Part-1.Cortex, directions=YES
COORD, ELSE, EVOL
**
** FIELD OUTPUT: F-Output-4
**
*Node Output, nset=Part-1.Subcortex
COORD, U
*Element Output, elset=Part-1.Subcortex, directions=YES
COORD, ELSE, EVOL
**
** FIELD OUTPUT: F-Output-2
**
*Node Output, nset=Part-1.whole-domain
COORD, U
*Element Output, elset=Part-1.whole-domain, directions=YES
COORD, ELSE, EVOL, LE, PE, S, SDV, PEEQ
**
** HISTORY OUTPUT: H-Output-1
**
*Output, history, time interval=0.001
*Energy Output, elset=Part-1.whole-domain
ALLIE, ALLKE
*End Step
